# Лабораторна робота №1
# Тема УЗАГАЛЬНЕНИЙ РЯД ФУР’Є ТА СИСТЕМИ БАЗИСНИХ
# ФУНКЦІЙ
# Варіант 2
Парамети
A := 1
T := 1
t1 := T/2
Функція
f(t) :=
    A if 0 ≤ t ≤ t1
    (-A) otherwise
f_p(t, n) := n + sum(f(t - i*T), i = 0 .. n)
Рисунок
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# 1. Згідно із заданим варіантом розглянути періодичний сигнал та розкласти його спочатку:
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# 1.1. У тригонометричний ряд Фур’є, отримавши коефіцієнти ряду
# a_k та b_k . Виконати синтез сигналу. Побудувати відповідні графіки.
j := sqrt(-1)
N := 7
k := 0 .. N
a[k] := 2/T*integral(f(t)*cos(2*π/T*k*t), t = 0 .. T)
b[k] := 2/T*integral(f(t)*sin(2*π/T*k*t), t = 0 .. T)
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# Синтез сигналу:
S1(x1, M) :=
    a[0]/2 if M == 0
    a[0]/2 + sum(a[k]*cos(2*π/T*k*x1), k = 1 .. M) + sum(b[k]*sin(2*π/T*k*x1), k = 1 .. M) otherwise
Графік
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# 1.2. У тригонометричний ряд Фур’є, отримавши коефіцієнти А_k ,φ_k.
# Побудувати амплітудний та фазовий спектр. Виконати синтез сигналу
A1[k] := sqrt(a[k]^2 + b[k]^2)
ψ[k] :=
    π/2 if (a[k] + j*b[k]) == 0
    (-arg(a[k] + j*b[k])) otherwise
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# Синтез сигналу:
S2(x1, M) :=
    a[0]/2 if M == 0
    a[0]/2 + sum(A1[k]*cos(2*π/T*k*x1 + ψ[k]), k = 1 .. M) otherwise
Графік
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# 1.3. У комплексний ряд Фур’є. Побудувати амплітудний та фазовий спектри. Виконати синтез сигналу.
ω := 2*π/T
C(k) := 1/T*integral(f(t)*e^(-j*k*ω*t), t = 0 .. T)
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# Синтез сигналу:
S3(t, M) := sum(C(k)*e^(j*k*ω*t), k = -M .. M)
Графік
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# 1.4. У ряд Фур’є за системою базисних функцій Уолша-Пелі.
signum(x) := if(x == 0, 1, x/|x|)
x := -5, -4.99 .. 5
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# Розрахуємо систему функцій Радемахера та систему функцій Уолша-Пелі для N=8:
r(k, z) := if(k == 0, 1, signum(sin(2^k*π*z)))
z := 0, 0.01 .. T
W(z) := [
    r(0, z);
    r(1, z);
    r(2, z);
    r(1, z)*r(2, z);
    r(3, z);
    r(1, z)*r(3, z);
    r(2, z)*r(3, z);
    r(1, z)*r(2, z)*r(3, z)
]
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# Виконаємо розклад сигналу у ряд Фур’є-Уолша:
m := 0 .. 7
CC[m] := 1/T*integral(f(z)*W(z/T)[m], z = 0 .. T)
CC^T = [0; 1; 0; 0; 0; 0; 0; 0]
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# Синтезуємо сигнал:
x(z, M) := sum(CC[m]*W(z/T)[m], m = 0 .. M)
# 2. Синтезувати ( відновити) сигнали у кожному базисі. Зобразити на одному графіку вихідний сигнал, синтезований за допомогою тригонометричного ряду Фур’є та синтезований за допомогою базису Уолша-Пелі.
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# 3. Обчислити норму похибки апроксимації для кожного з базисів для одного й того самого значення N. Зробити висновки щодо якості апроксимації кожним з методів.
# Обчислимо норму похибки для кожного базису:
# Для базису Фур’є:
n := T/0.01
n = 100
i := 0 .. n
S11[i] := S1(i - 0.01, N)
f1[i] := f(i - 0.01)
ε_F := sum((S11[i] - f1[i])^2, i = 0 .. n)
ε_F = 47.3073
# Для базису Уолша-Пелі:
x1[i] := x(i - 0.01, N)
ε_UP := sum((x1[i] - f1[i])^2, i = 0 .. n)
ε_UP = 0
# Виходячи з отриманих результатів, можна вважати, що, для даної функції, якість апроксимації методом базисів Уолша-Пелі є кращою за Фур'є.
