# Лабораторна робота №2
# Синтез нерекурсивного цифрового фільтра
# Аналітичний вид сигналу
x(t) := cos(t) + cos(7*t) + cos(15*t)
j := sqrt(-1)
# Часовий інтервал очікування аналогового сигналу:
T := 2*π
# Нормування часового інтервалу очікування сигналу:
dt := 0.001
t := 0, dt .. T
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# Розрахунки частот:
# Гранична частота ФНЧ: | Частота дискретизації вхідного сигналу:
f_g := 10/(2*π)
f_a := 6*f_g
f_g = 1.59155
f_a = 9.5493
ω_g := 2*π*f_g
ω_a := 2*π*f_a
ω_g = 10
ω_a = 60
T_g := 1/f_g
T_a := 1/f_a
T_g = 0.628319
T_a = 0.10472
# Бажана передаточна функція ФНЧ:
G_lpf_w(ω) := if(|ω| ≤ ω_g, 1, 0)
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# Розрахунок коефіцієнтів ФНЧ:
lpf(k) := T_a/(2*π)*integral(G_lpf_w(ω)*exp(j*ω*k*T_a), ω = -π/T_a .. π/T_a)
# Порядок ФНЧ:
N := 5
k := -N .. N
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# Згладжуюче вікно фон Ганна:
w_von_Hann(k) := 1/2*(1 + cos(π*k/N))
# Згладжуюча функція Ланчоса:
σ(filter_order, k) := sin(π*k/filter_order)/(π*k/filter_order)
# Кількість дискретних відліків фильтрованого сигналу:
K := ceil(T/T_a)
K = 60
n := 0 .. K
# Коефіцієнти усе частотного фільтру :
bbf(z) := if(z == 0, 1, 0)
# Коефіцієнти ФВЧ:
hpf(k) := bbf(k) - lpf(k)
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# Бажана передаточна функція ФВЧ:
G_hpf_w(ω) := if(|ω| ≥ ω_g, 1, 0)
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# Апроксимуюча передаточна функція ФВЧ:
# Реального фільтра:
G_hpf_d(ω) := sum(hpf(k)*exp(-j*k*ω*T_a), k = -N .. N)
# Згладжена вікном фон Ганна:
G_hpf_d_von_Hann(ω) := sum(hpf(k)*w_von_Hann(k)*exp(-j*k*ω*T_a), k = -N .. N)
# Згладжена функцією Ланчоса:
G_hpf_d_Lanczos(ω) := sum(hpf(k)*σ(N, k)*exp(-j*k*ω*T_a), k = -N .. N)
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# Рівняння фільтра:
y_hpf[n] := sum(hpf(k)*x(T_a*(n - k)), k = -N .. N)
# Рівняння фільтра згладженого фон Ганном:
y_hpf_von_Hann[n] := sum(hpf(k)*w_von_Hann(k)*x(T_a*(n - k)), k = -N .. N)
# Рівняння фільтра згладженого Ланчосом::
y_hpf_Lanczos[n] := sum(hpf(k)*σ(N, k)*x(T_a*(n - k)), k = -N .. N)
# Восстановление дискретного фильтрованного сигнала с помощью ряда Котельникова:
F_S_hpf(t) := sum(y_hpf[k]*sin(ω_a/2*(t - k*T_a))/(ω_a/2*(t - k*T_a)), k = 0 .. K)
F_S_hpf_von_Hann(t) := sum(y_hpf_von_Hann[k]*sin(ω_a/2*(t - k*T_a))/(ω_a/2*(t - k*T_a)), k = 0 .. K)
F_S_hpf_Lanczos(t) := sum(y_hpf_Lanczos[k]*sin(ω_a/2*(t - k*T_a))/(ω_a/2*(t - k*T_a)), k = 0 .. K)
high(t) := cos(15*t)
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# Среднее квадратическое отклонение ФВЧ, приближенного к идеальному ФВЧ:
SKO := sqrt(1/(K + 1)*sum((high(k*T_a) - F_S_hpf(k*T_a))^2, k = 0 .. K))
SKO = 0.0770775
SKO_von_Hann := sqrt(1/(K + 1)*sum((high(k*T_a) - F_S_hpf_von_Hann(k*T_a))^2, k = 0 .. K))
SKO_von_Hann = 0.210404
SKO_Lanczos := sqrt(1/(K + 1)*sum((high(k*T_a) - F_S_hpf_Lanczos(k*T_a))^2, k = 0 .. K))
SKO_Lanczos = 0.175125
