# Лабораторна робота № 3
# Синтез рекурсивного цифрового фільтра
# Мета: навчитися проводити аналіз та синтез рекурсивного цифрового фільтра.
x(t) := 10*cos(40*t) + 5*cos(15*t) + 10*cos(30*t)
j := sqrt(-1)
# СФ Чебишова
N := 3
T := 4*π
# 1. Побудувати графік заданого аналогового вхідного сигналу x(t).
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# 2. Установити необхідні граничні частоти фільтра (f_g, f_g_low, f_g_high),
# частоту Найквіста для аналогового сигналу (f_a), часовий інтервал Найквіста (T_a) (див. допоміжні файли ІIR_filters.mcd та ІIR_filters.xls)
f_g_low := 10  # рад/сек
f_g_high := 20  # рад/сек
f_a := 4*f_g_high  # рад/сек
T_a := 6/f_a  # сек
ω_a := 2*π/T_a
# 3.Користуючись пунктами 1–5 розділу «Короткі теоретичні відомості», обчислити коефіцієнти a_k, b_k  шуканого фільтра.
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f1 := [0.3110, 1; 0.3110, -0.3780; 0, 0]
f2 := [0.3636, 1; 0.7273, -0.1496; 0.3636, 0.6042]
# Отримання зчеплення масивів коефіцієнтів
M := augment(f1, f2)
# Розрахунок коефіцієнтів передаточної функції прототипу:
# Функція дозволяюча знаходити добуток многочленів довільного порядку відносно їх коефіцієнтів
mul(A, B) :=
    for k ∈ 0 .. last(A) + last(B)
        Rez[k] ← 0
    for i ∈ 0 .. last(A)
        for j ∈ 0 .. last(B)
            Rez[i + j] ← Rez[i + j] + A[i]*B[j]
    Rez
# Функція, що вираховує коефіцієнти при (z^(*))^(-k) прототипу передаточної функції
coeff_prot(M) :=
    k ← cols(M) - 1
    num ← M[:, 0]
    den ← M[:, 1]
    for i ∈ 2 .. k
        num ← mul(num, M[:, i]) if mod(i, 2) == 0
        den ← mul(den, M[:, i]) if mod(i, 2) == 1
    Rez[:, 0] ← num
    Rez[:, 1] ← den
    Rez
Gp := coeff_prot(M)
# Чисельник:
transpose(Gp[:, 0]) = [0.11308, 0.33927, 0.33927, 0.11308, 0]
# Знаменник:
transpose(Gp[:, 1]) = [1, -0.5276, 0.660749, -0.228388, 0]
# Частотне перетворення:
# Перетворення прототипу ФНЧ у реальний СФ
z_lpf_bpf(f_g_low, f_g_high, f_a) :=
    d ← cos(π*f_g_high/f_a + π*f_g_low/f_a)/cos(π*f_g_high/f_a - π*f_g_low/f_a)
    k ← cot(π*f_g_high/f_a - π*f_g_low/f_a)*tan(π*1/4)
    numerator[0] ← (k - 1)/(k + 1)
    numerator[1] ← -2*d*k/(k + 1)
    numerator[2] ← 1
    denominator[0] ← 1
    denominator[1] ← -2*d*k/(k + 1)
    denominator[2] ← (k - 1)/(k + 1)
    Rez[:, 0] ← -1*numerator
    Rez[:, 1] ← denominator
    Rez
z_1 := z_lpf_bpf(f_g_low, f_g_high, f_a)
# Розрахунок коефіцієнтів передаточної функції реального фільтра:
Z_1_d(Z1, k) :=
    Rez ← Z1 if k == 1
    if k > 1
        Rez ← mul(Z_1_d(Z1, k/2), Z_1_d(Z1, k/2)) if mod(k, 2) == 0
        Rez ← mul(Z_1_d(Z1, k - 1), Z_1_d(Z1, 1)) if mod(k, 2) == 1
    Rez
Z(Z1, k) :=
    Rez[:, 0] ← Z_1_d(Z1[:, 0], k)
    Rez[:, 1] ← Z_1_d(Z1[:, 1], k)
    Rez
# Функція, що вираховує коефіцієнти при z^(-k) передаточної функції реального фільтра
coeff_real(Gp, Z1) :=
    k ← last(Gp[:, 0])
    Rez[:, 0] ← Gp[:, 0][0]*Z(Z1, k)[:, 1] + sum(Gp[:, 0][i]*mul(Z(Z1, k - i)[:, 1], Z(Z1, i)[:, 0]), i = 1 .. k - 1) + Gp[:, 0][k]*Z(Z1, k)[:, 0]
    Rez[:, 1] ← Gp[:, 1][0]*Z(Z1, k)[:, 1] + sum(Gp[:, 1][i]*mul(Z(Z1, k - i)[:, 1], Z(Z1, i)[:, 0]), i = 1 .. k - 1) + Gp[:, 1][k]*Z(Z1, k)[:, 0]
    Rez[:, 0] ← Rez[:, 0]/Rez[:, 1][0]
    Rez[:, 1] ← Rez[:, 1]/Rez[:, 1][0]
    Rez
Gr := coeff_real(Gp, z_1)
# Чисельник:
transpose(Gr[:, 0]) = [0.0168548, -0.00986213, -0.0436212, 0.0296432, 0.0296385, -0.0296497, 0.00410934, 0.00986869, -0.00698149]
# Знаменник:
transpose(Gr[:, 1]) = [1, -2.64669, 5.06447, -6.19505, 6.11851, -4.26056, 2.37647, -0.816732, 0.203911]
ω := 0, 0.01 .. ω_a/2
Gz(ω, G, T_a) :=
    j ← sqrt(-1)
    k ← last(G[:, 0])
    (G[:, 0][0] + sum(G[:, 0][i]*exp(-j*i*ω*T_a), i = 1 .. k))/(G[:, 1][0] + sum(G[:, 1][i]*exp(-j*i*ω*T_a), i = 1 .. k))
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# Побудрва рекурсивного фільтра
# Порядок фільтра
N := last(Gr[:, 0])
K := ceil(T/T_a)
n := 0 .. N - 1
y[n] := 0
n := N .. K
y[n] := sum(Gr[:, 0][i]*x(T_a*(n - i)), i = 0 .. N) - sum(Gr[:, 1][i]*y[n - i], i = 1 .. N)
# Відновлення фільтрованого сигналу з дискретної послідовності (ряд Котельникова)
F_S(t) := sum(y[n]*sin(ω_a/2*(t - n*T_a))/(ω_a/2*(t - n*T_a)), n = 0 .. K)
# Інтервал затримки фільтра
mov := N*T_a
mov = 0.6
# Ідеальний фільтрований сигнал
high(t) := 5*cos(15*t)
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